Udn := 110
L := 2.5
R := 5
ωdn := 100
Idn := 6.5
Mdn := 1.7
ce := (Udn - R*Idn)/ωdn = 0.775  # В*с/рад
cm := Mdn/Idn = 0.261538  # Н*м/А
km := R/(ce*cm) = 24.6679
kd := 1/ce = 1.29032
Te := L/R = 0.5  # c
i := 25
Jd := 1.1*10^-3  # кг*м^2
Jp := 0.1*Jd = 0.00011  # кг*м^2
Jn := 0.105  # кг*м^2
Jd + Jp + Jn/i^2 = 0.001378
Tm := (Jd + Jp + Jn/i^2)/(ce*cm)*R = 0.0339924  # c
δm := 10^-3  # рад
Mn := 6.19  # Нм
ωm := 4  # рад/с
cm/R = 0.0523077
K := (ωm + km*Mn/i^2)/δm = 4244.31
α := 3.2
εm := 30  # рад/с^2
T1 := δm/εm*K = 0.141477  # с
T2 := sqrt(δm*α/εm) = 0.010328  # с
T3 := 0.1*T2 = 0.0010328  # с
ω2 := 1/T2 = 96.8246
ωc := α*ω2 = 309.839
K1 := K*i*Tm/(T3*kd) = 2706553
K2 := (Tm - T3)/(T3*kd) = 24.7326
A := ωm^2/εm = 0.533333
ωm2 := εm/ωm = 7.5
