f(x) := e^(-1.5*x)*(3*cos(sqrt(7)/2*x) + 35/(3*sqrt(7))*sin(sqrt(7)/2*x)) - 3*cos(2*x) - 1/6*sin(2*x)
solve block
    # constraints
    y''(x) == 18*sin(2*x) - cos(2*x) - 4*y(x) - 3*y'(x)
    y'(0) == 1
    y(0) == 0
    # solver
    y := odesolve(y(x), 10)
end solve block
# [plot: y(x), f(x) vs x]
