k := 314
T1 := 0.3142
T2 := 0.0566
T3 := 0.0057
Gg(p) := k*(T2*p + 1)/(p*((T1*p + 1)*(T3*p + 1)))
Gz(p) := Gg(p)/(1 + Gg(p))
H(p) := Gz(p)/p
h(t) := H(p) invlaplace, p → 1.09e-21*e^(-3.18268618714*t) - 2.5e-21*e^(-175.438596491*t) + 1.28887024444*e^(-27.9723516256*t) - 2.28887024444*cos(24.3739590093*t)*e^(-75.3244655264*t) - 5.59429824643*sin(24.3739590093*t)*e^(-75.3244655264*t) + 1.0
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